# Como calcular la impedancia de entrada de un amplificador no inversor
# Ganancia diferencial o ganancia en bucle abierto (open loop)
A_olmin := 50 V/mV = 50000
A_olmax := 100 V/mV = 100000
A_dmin := A_olmin
A_dmax := A_olmax
# Impedancia de entrada
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# Podemos decir que el voltaje que entra al amplificador es el voltaje de entrada menos una porción del voltaje de salida gracias al divisor de voltaje, hecho por las resistencias de lazo, R1 Y R2
U_d := U_e - β*U_s  # error: Esta variable no está definida. Compruebe que el rótulo esté definido correctamente.
# beta es una porción de la tensión de salida
R_1 := 2000 Ω
R_2 := 10000 Ω
β := R_2/(R_1 + R_2) = 0.833333
ri := 1 MΩ
ze_min := (1 + β*A_dmin)*ri = 4.16677e10 Ω
ze_max := (1 + β*A_dmax)*ri = 8.33343e10 Ω
# Impedancia de salida
r_0 := 100 Ω
zs := r_0/(1 + β*A_dmax) = 0.00119999 Ω
zs := r_0/(1 + β*A_dmin) = 0.00239994 Ω
# ri y r0 son las resistencias de entrada y salida del amplificador operacional, especificados por el fabricante
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# Dado que la impedancia de entrada es enorme, podemos decir que es casi infinita, y la señal de entrada no pasaría. Para sopesar esta situación conectamos un resistor en paralelo a la entrada del amplificador de esta manera, la impedancia de entrada se convierte prácticamente en la resistencia que conectemos en paralelo.
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# La impedancia equivalente se calcula con la resistencia equivalente de las dos resistencias en paralelo, r3 y ze
R_3 := 4000 Ω
z_equivalenteMin := R_3*ze_min/(R_3 + ze_min) = 4000 Ω
z_equivalenteMax := R_3*ze_max/(R_3 + ze_max) = 4000 Ω
# https://www.youtube.com/watch?v=mhaa4QElSOw
